// COMSOL Multiphysics 5.3.0.316 model "Q5.mph"
// Outline of the model tree

Parameters
  hh = 0.1[m]  // Liquid height
  R2 = 3[m]  // R2
  alpha = .8  // alpha

Geometry
  geom1 "Geometry 1" (3D, length unit m)
    cyl1: Cylinder | r = R2; h = 12
    cyl2: Cylinder | r = R2-0.25; h = 12
    dif1: Difference | input = cyl1; input2 = cyl2
    cyl3: Cylinder | r = alpha*R2; h = 12
    cyl4: Cylinder | r = R2-0.25; h = hh
    cyl5: Cylinder | r = 20; h = 14
    fin: Finalize "Form Union"

Materials
  mat1: Common "Air [gas]" on domains 1
    def "Basic"
      thermalconductivity = k(T[1/K])[W/(m*K)]
      heatcapacity = C(T[1/K])[J/(kg*K)]
      density = rho_gas_2(T[1/K])[kg/m^3]
      TD = TD(T[1/K])[m^2/s]
      dynamicviscosity = eta(T[1/K])[Pa*s]
      relpermittivity = 1
      k: Piecewise | arg = T; pieces = {70.0, 1000.0, -8.404165E-4+1.107418E-4*T^1-8.635537E-8*T^2+6.31411E-11*T^3-1.88168E-14*T^4}
      C: Piecewise
        arg = T
        pieces = 
          {100.0, 375.0, 1010.97+0.0439479*T^1-2.922398E-4*T^2+6.503467E-7*T^3}
          {375.0, 1300.0, 1093.29-0.6355521*T^1+0.001633992*T^2-1.412935E-6*T^3+5.59492E-10*T^4-8.663072E-14*T^5}
          {1300.0, 3000.0, 701.0807+0.8493867*T^1-5.846487E-4*T^2+2.302436E-7*T^3-4.846758E-11*T^4+4.23502E-15*T^5}
      rho_gas_2: Piecewise "Piecewise 2a" | arg = T; pieces = {80.0, 3000.0, 352.716*T^-1}
      TD: Piecewise
        arg = T
        pieces = 
          {300.0, 753.0, 1.713214E-4-1.204913E-6*T^1+2.839046E-9*T^2-1.532799E-12*T^3}
          {753.0, 873.0, 0.00416418-1.191227E-5*T^1+8.863636E-9*T^2}
      eta: Piecewise
        arg = T
        pieces = 
          {120.0, 600.0, -1.132275E-7+7.94333E-8*T^1-7.197989E-11*T^2+5.158693E-14*T^3-1.592472E-17*T^4}
          {600.0, 2150.0, 3.892629E-6+5.75387E-8*T^1-2.675811E-11*T^2+9.709691E-15*T^3-1.355541E-18*T^4}
  mat2: Common "Water, liquid" on domains 2
    def "Basic"
      dynamicviscosity = eta(T[1/K])[Pa*s]
      ratioofspecificheat = 1.0
      electricconductivity = 5.5e-6[S/m]
      heatcapacity = Cp(T[1/K])[J/(kg*K)]
      density = rho(T[1/K])[kg/m^3]
      thermalconductivity = k(T[1/K])[W/(m*K)]
      soundspeed = cs(T[1/K])[m/s]
      relpermittivity = 20
      eta: Piecewise
        arg = T
        pieces = 
          {273.15, 413.15, 1.3799566804-0.021224019151*T^1+1.3604562827E-4*T^2-4.6454090319E-7*T^3+8.9042735735E-10*T^4-9.0790692686E-13*T^5+3.8457331488E-16*T^6}
          {413.15, 553.75, 0.00401235783-2.10746715E-5*T^1+3.85772275E-8*T^2-2.39730284E-11*T^3}
      Cp: Piecewise | arg = T; pieces = {273.15, 553.75, 12010.1471-80.4072879*T^1+0.309866854*T^2-5.38186884E-4*T^3+3.62536437E-7*T^4}
      rho: Piecewise | arg = T; pieces = {273.15, 553.75, 838.466135+1.40050603*T^1-0.0030112376*T^2+3.71822313E-7*T^3}
      k: Piecewise | arg = T; pieces = {273.15, 553.75, -0.869083936+0.00894880345*T^1-1.58366345E-5*T^2+7.97543259E-9*T^3}
      cs: Interpolation | table = {{273, 1403}, {278, 1427}, {283, 1447}, {293, 1481}, {303, 1507}, {313, 1526}, {323, 1541}, {333, 1552}, {343, 1555}, {353, 1555}, {363, 1550}, {373, 1543}}; interp = piecewisecubic
  mat3: Common "Cu - Copper" on domains 3-5
    def "Basic"
      electricconductivity = 58.1e6[S/m]
      thermalexpansioncoefficient = 16.5e-6[1/K]
      heatcapacity = 384[J/(kg*K)]
      density = 8960[kg/m^3]
      thermalconductivity = 401[W/(m*K)]
      relpermittivity = 130
    Enu "Young's modulus and Poisson's ratio"
      youngsmodulus = 120e9[Pa]
      poissonsratio = 0.34

Physics
  es: Electrostatics on all domains
    dependent variable V
    ccn1: ChargeConservation (default)
    zc1: ZeroCharge (default)
    init1: init "Initial Values 1" (default)
    gnd1: Ground on boundaries 15, 16, 18, 19, 26-29
    term1: Terminal on boundaries 9, 10, 12, 13, 24, 25, 30, 31 | TerminalType = Circuit; V0 = 100
  cir: Circuit "Electrical Circuit"
    dependent variable voltages
    gnd1: GroundNode | Connections = gnd
    R1: Resistor "Resistor R1" | R = 100[Ω]; Connections = {10V, gnd Vo}
    R2: Resistor "Resistor R2" | Connections = {gnd Vo, gnd}
    C1: Capacitor "Capacitor C1" | Connections = {Vo, gnd}
    V1: VoltageSource "Voltage Source V1" | Connections = {10V, gnd}; value = 10[V]
    IvsU1: ModelDeviceIV "External I Vs. U 1" | V_src = root.comp1.es.V0_1; Connections = {10V, Vo}

Mesh
  mesh1 "Mesh 1" (physics-controlled)

Studies
  std1 "Study 1"
    param: Parametric "Parametric Sweep" | pname = hh; plistarr = range(0.1,0.1,10); punit = m
    stat: Stationary