// COMSOL Multiphysics 5.3.0.316 model "Q2.mph"
// Outline of the model tree

Parameters
  l = 200[um]  // lenght
  w = 20[um]  // width
  d = 5[um]  // diff

Geometry
  geom1 "Geometry 1" (2D, length unit µm)
    r1: Rectangle | size = {4000, 600}
    r2: Rectangle | pos = {100, 250}; size = {w, l}
    r3: Rectangle | pos = {100+d+w, 150}; size = {w, l}
    arr1: Array | input = r2, r3; size = 50; type = linear; linearsize = 50; displ = {2*(w+d), 0}
    r4: Rectangle | pos = {100, 250+l}; size = {49*2*w+2*49*d+w, 20}
    r5: Rectangle | pos = {100+w+d, 130}; size = {49*2*w+2*49*d+w, 20}
    uni1: Union
      input = arr1(1,1), arr1(10,1), arr1(11,1), arr1(12,1), arr1(13,1), arr1(14,1), arr1(15,1), arr1(16,1), arr1(17,1), arr1(18,1), arr1(19,1), arr1(2,1), arr1(20,1), arr1(21,1), arr1(22,1), arr1(23,1), arr1(24,1), arr1(25,1), arr1(26,1), arr1(27,1), arr1(28,1), arr1(29,1), arr1(3,1), arr1(30,1), arr1(31,1), arr1(32,1), arr1(33,1), arr1(34,1), arr1(35,1), arr1(36,1), arr1(37,1), arr1(38,1), arr1(39,1), arr1(4,1), arr1(40,1), arr1(41,1), arr1(42,1), arr1(43,1), arr1(44,1), arr1(45,1)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
      intbnd = off
      edge = all
    uni2: Union
      input = arr1(1,2), arr1(10,2), arr1(11,2), arr1(12,2), arr1(13,2), arr1(14,2), arr1(15,2), arr1(16,2), arr1(17,2), arr1(18,2), arr1(19,2), arr1(2,2), arr1(20,2), arr1(21,2), arr1(22,2), arr1(23,2), arr1(24,2), arr1(25,2), arr1(26,2), arr1(27,2), arr1(28,2), arr1(29,2), arr1(3,2), arr1(30,2), arr1(31,2), arr1(32,2), arr1(33,2), arr1(34,2), arr1(35,2), arr1(36,2), arr1(37,2), arr1(38,2), arr1(39,2), arr1(4,2), arr1(40,2), arr1(41,2), arr1(42,2), arr1(43,2), arr1(44,2), arr1(45,2)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
      intbnd = off
      edge = all
    fin: Finalize "Form Union"

Materials
  mat1: Common "Air" on domains 1
    def "Basic"
      relpermeability = 1
      relpermittivity = 1
      dynamicviscosity = eta(T[1/K])[Pa*s]
      ratioofspecificheat = 1.4
      electricconductivity = 0[S/m]
      heatcapacity = Cp(T[1/K])[J/(kg*K)]
      density = rho(pA[1/Pa],T[1/K])[kg/m^3]
      thermalconductivity = k(T[1/K])[W/(m*K)]
      soundspeed = cs(T[1/K])[m/s]
      eta: Piecewise | arg = T; pieces = {200.0, 1600.0, -8.38278E-7+8.35717342E-8*T^1-7.69429583E-11*T^2+4.6437266E-14*T^3-1.06585607E-17*T^4}
      Cp: Piecewise | arg = T; pieces = {200.0, 1600.0, 1047.63657-0.372589265*T^1+9.45304214E-4*T^2-6.02409443E-7*T^3+1.2858961E-10*T^4}
      rho: Analytic | expr = pA*0.02897/8.314/T; args = {pA, T}; dermethod = manual; argders = {{pA, d(pA*0.02897/8.314/T,pA)}, {T, d(pA*0.02897/8.314/T,T)}}
      k: Piecewise | arg = T; pieces = {200.0, 1600.0, -0.00227583562+1.15480022E-4*T^1-7.90252856E-8*T^2+4.11702505E-11*T^3-7.43864331E-15*T^4}
      cs: Analytic | expr = sqrt(1.4*287*T); args = T; dermethod = manual; argders = {T, d(sqrt(1.4*287*T),T)}
    RefractiveIndex
      n = 1
      ki = 0
  mat2: Common "Copper" on domains 2, 3
    def "Basic"
      relpermeability = 1e16
      electricconductivity = 5.998e7[S/m]
      heatcapacity = 385[J/(kg*K)]
      relpermittivity = 1
      emissivity = 0.5
      density = 8700[kg/m^3]
      thermalconductivity = 400[W/(m*K)]
    linzRes "Linearized resistivity"
      rho0 = 1.667e-8[ohm*m]
      alpha = 3.862e-3[1/K]
      Tref = 293.15[K]

Physics
  es: Electrostatics on all domains
    dependent variable V
    ccn1: ChargeConservation (default)
    zc1: ZeroCharge (default)
    init1: init "Initial Values 1" (default)
    gnd1: Ground on boundaries 11
    term1: Terminal on boundaries 7 | TerminalType = Voltage

Mesh
  mesh1 "Mesh 1" (physics-controlled)

Studies
  std1 "Study 1"
    param: Parametric "Parametric Sweep"
      pname = {l, w, d}
      plistarr = {range(200,50,300), range(20,5,30), range(5,2.5,10)}
      punit = {, , }
    stat: Stationary

Solver configurations
  sol1 "Solution 1" (study std1)
    v1: Variables "Dependent Variables 1"
    s1: Stationary "Stationary Solver 1"
      dDef: Direct
      fc1: FullyCoupled | linsolver = dDef
  sol2 "Parametric Solutions 1" (study std1)

Datasets
  dset1: Solution | solution = sol1
  dset2: Solution | solution = sol2

Plots
  pg1: PlotGroup1D "1D Plot Group 1" | data = dset1
    ptgr1: PointGraph | expr = es.C11; descr = Maxwell capacitance; xdataexpr = d
    ptgr2: PointGraph | expr = es.C11; descr = Maxwell capacitance; xdataexpr = l
    ptgr3: PointGraph | expr = es.C11; descr = Maxwell capacitance; xdataexpr = w