// COMSOL Multiphysics 5.3.0.316 model "capacitive_pressure_sensor.mph"
// Capacitive Pressure Sensor
// Outline of the model tree

Parameters
  p0 = 20[kPa]  // Pressure
  T0 = 20[degC]  // Operating temperature
  Tref = 70[degC]  // Die Bonding temperature

Selections
  box1: Box "YZ Symmetry Plane" | entitydim = 2; xmax = 1e-6; condition = inside
  box2: Box "XZ Symmetry Plane" | entitydim = 2; ymax = 1e-6; condition = inside
  box3: Box "Steel Base" | entitydim = 3; zmax = -100[um]; condition = inside
  sel1: Explicit "Cavity" on domains 3
  sel2: Explicit "All domains" on all domains
  dif1: Difference "Linear Elastic" | entitydim = 3; add = {sel2}; subtract = {sel1}

Couplings
  aveop1: Average on boundaries 12
  intop1: Integration on points 4

Geometry
  geom1 "Geometry 1" (3D, length unit mm)
    blk1: Block
      pos = {0, 0, -1.1}
      size = {1.2, 1.2, 1.51}
      layername = {Layer 1, Layer 2, Layer 3, Layer 4}
      layer = {0.7, 0.397, 0.003, 0.01}
    blk2: Block | pos = {0, 0, -1.1}; size = {0.5, 0.5, 1.51}
    pard1: PartitionDomains | domain = blk1(1) domains 1-4; partitionwith = objects; object = blk2
    hex1: Hexahedron
      p = 
        {0, 0.5, 0.5, 0, 0, 0.78322, 0.78322, 0}
        {0, 0, 0.5, 0.5, 0, 0, 0.78322, 0.78322}
        {0.01, 0.01, 0.01, 0.01, 0.41, 0.41, 0.41, 0.41}
    dif1: Difference | input = pard1; input2 = hex1
    cyl1: Cylinder | pos = {0, 0, -1.1}; r = 3; h = 0.7
    pard2: PartitionDomains
      domain = cyl1(1) domains 1
      partitionwith = extendedfaces
      extendedface = dif1(1) boundaries 17, 38
    del1: Delete "Delete Entities 1" | input = pard2(1) domains 1-3; blk2(1) domains 1
    fin: Finalize "Form Union"
    sel1: ExplicitSelection "YZ Symmetry Plane"
      selection = fin(1) boundaries 1, 4, 7, 10, 14, 17, 20, 23, 26, 30
      groupcontang = on
    sel2: ExplicitSelection "XZ Symmetry Plane"
      selection = fin(1) boundaries 2, 5, 8, 11, 40, 42, 44, 46, 48, 50
      groupcontang = on
    boxsel1: BoxSelection "Steel Base" | entitydim = 3; zmax = -0.1; condition = inside
    sel3: ExplicitSelection "Cavity" | selection = fin(1) domains 3
    sel4: ExplicitSelection "Geometry" | selection = fin; selshow = all
    difsel1: DifferenceSelection "Linear Elastic" | entitydim = 3; add = {sel4.dom}; subtract = {sel3}

Materials
  mat1: Common "Silicon" on all domains
    def "Basic"
      relpermittivity = 11.7
      youngsmodulus = 170[GPa]
      poissonsratio = 0.06
      density = 2330
      thermalexpansioncoefficient = 2.6e-6
  mat2: Common "Vacuum" on selection sel1
    def "Basic"
      relpermittivity = 1
  mat3: Common "Steel AISI 4340" on selection box3
    def "Basic"
      relpermeability = 1
      electricconductivity = 4.032e6[S/m]
      thermalexpansioncoefficient = 12.3e-6[1/K]
      heatcapacity = 475[J/(kg*K)]
      relpermittivity = 1
      density = 7850[kg/m^3]
      thermalconductivity = 44.5[W/(m*K)]
    Enu "Young's modulus and Poisson's ratio"
      youngsmodulus = 205e9[Pa]
      poissonsratio = 0.28

Physics
  emi: Electromechanics on all domains
    dependent variable u = {u, v, w}
    free1: FreeDeformation (default)
    eqm1: ElectromechanicsQuasistaticModel "Electrical Material Model 1" (default)
    zc1: ZeroCharge (default)
    free2: Free (default)
    emd1: ElectromechanicalInterface (default)
    disp1: PrescribedMeshDisplacement (default) | useDx = {1, 1, 0}
    led1: LinearElasticDielectric on no domains
    init1: init "Initial Values 1" (default)
    lemm1: LinearElasticModel "Linear Elastic Material 1" on selection dif1
      te1: ThermalExpansion on all domains | Tref = Tref; minput_temperature = T0
    sym1: SymmetrySolid "Symmetry 1" on selection box2
    sym2: SymmetrySolid "Symmetry 2" on selection box1
    disp2: Displacement0 "Prescribed Displacement 2" on points 44 | Direction = {0, 0, 1}
    bndl1: BoundaryLoad on boundaries 13 | LoadType = FollowerPressure; FollowerPressure = p0
    term1: Terminal on boundaries 12 | TerminalType = Voltage
    gnd1: Ground on boundaries 9

Mesh
  mesh1 "Mesh 1"
    size: MeshSizeDefault | hmax = 0.3; hmin = 0.054; hcurve = 0.6; hnarrow = 0.5; hgrad = 1.5
    ftet1: FreeTet "Free Tetrahedral 1" (disabled) on remaining entities
    size1: Size on boundaries 3 | hmax = 50[um]; custom = on
    map1: Map "Mapped 1" on boundaries 3, 16, 32
    swe1: Sweep "Swept 1" on remaining entities

Studies
  std1 "Study 1"
    stat: Stationary | useparam = on; pname = p0; plistarr = range(0,5000,25000)
  std2 "Study 2"
    stat: Stationary | useparam = on; pname = p0; plistarr = range(0,5000,25000)
  std3 "Study 3"
    stat: Stationary | useparam = on; pname = T0; plistarr = range(290,5,300)

Datasets
  dset1: Solution on domains 3, 4 | solution = none
  dset2: Solution | solution = none
  mir1: Mirror3D | data = dset2
  dset3: Solution | solution = none

Plots
  pg1: PlotGroup3D "Displacement (emi)" | data = dset1
    surf1: Surface | expr = emi.disp
  pg2: PlotGroup3D "Potential (emi)" | data = dset1
    slc1: Slice | expr = V; quickplane = xy; quickznumber = 1; shift = -5.8E-6
  pg3: PlotGroup1D "Diaphragm Displacement vs Pressure"
    data = dset1
    title = Diaphragm displacement
    xlabel = Pressure (Pa)
    ylabel = Displacement (\mu m)
    glob1: Global | expr = {intop1(w), aveop1(w)}; unit = {um, um}; descr = {Maximum Displacement, Average Displacement}
    glob2: Global
      data = dset2
      expr = {intop1(w), }
      unit = {um, }
      descr = {Maximum Displacement with Package Stress, }
  pg4: PlotGroup1D "Model Capacitance vs Pressure"
    data = dset1
    title = Model Capacitance vs Pressure
    xlabel = Pressure (Pa)
    ylabel = Capacitance (pF)
    glob1: Global
      expr = {emi.C11, 0.738[pF]*(1+8.87e-6[1/Pa]*p0)}
      unit = {pF, pF}
      descr = {Capacitance, Linearized Analytic Capacitance}
    glob2: Global | data = dset2; expr = emi.C11; unit = pF; descr = Capacitance with Package Stress
  pg5: PlotGroup3D "Displacement (emi) 1" | data = mir1
    surf1: Surface | expr = emi.disp
  pg6: PlotGroup3D "Potential (emi) 1" | data = dset2
    slc1: Slice | expr = V
  pg7: PlotGroup1D "Capacitance vs Operating Temperature"
    data = dset3
    title = Model Capacitance vs Operating Temperature
    xlabel = Operating Temperature (K)
    glob1: Global | expr = emi.C11; unit = pF; descr = Capacitance