// COMSOL Multiphysics 5.3.0.316 model "Untitled.mph"
// Outline of the model tree

Parameters
  U_mean = 1[m/s]  // Mean inflow velocity

Geometry
  geom1 "Geometry 1" (2D, length unit m)
    sq1: Square | size = 5
    sq2: Square | size = 4
    dif1: Difference | input = sq1; input2 = sq2
    sq3: Square | pos = {5, 0}; size = .2
    uni1: Union | input = dif1, sq3; intbnd = off; edge = all
    fin: Finalize "Form Union"

Materials
  mat1: Common "Material 1" on all domains
    def "Basic"
      density = 1.225
      dynamicviscosity = 1.81e-5

Physics
  spf: LaminarFlow "Creeping Flow" on all domains
    dependent variable u2 = {u2, v2, w2}
    PhysicalModelProperty.StokesFlowProp = 1
    PhysicalModelProperty.Compressibility = CompressibleMALT03
    PhysicalModelProperty.TurbulenceModelType = None
    PhysicalModelProperty.EnablePorousMediaDomains = 1
    PhysicalModelProperty.IncludeGravity = 1
    PhysicalModelProperty.UseReducedPressure = 1
    fp1: FluidProperties (default)
    init1: init "Initial Values 1" (default) | u_init = {0, 0, 0}; p_init = 0
    wallbc1: WallBC "Wall 1" (default)
    grav1: Gravity
    inl1: InletBoundary "Inlet 1" on boundaries 1
      BoundaryCondition = LaminarInflow
      U0in = 0.00001
      p0 = pi
      SuppressBackflow = 0
      FlowDirection = userdef
      d_u = {U_mean, 0, 0}
      LaminarInflowOption = Uav
      Uav = U_mean
    out1: OutletBoundary "Outlet 1" on boundaries 9 | BoundaryCondition = Pressure; LaminarOutflowOption = Uav; Uav = 0

Mesh
  mesh1 "Mesh 1" (physics-controlled)
    size: MeshSizeDefault | table = cfd; hauto = 6

Studies
  std1 "Study 1"
    param: Parametric "Parametric Sweep" | pname = U_mean; plistarr = range(1,0.1,10); punit = m/s
    stat: Stationary

Solver configurations
  sol1 "Solution 1" (study std1)
    v1: Variables "Dependent Variables 1"
    s1: Stationary "Stationary Solver 1"
      p1: Parametric | pname = U_mean; plistarr = range(1,0.1,10); punit = m/s; pcontinuationmode = no
      fc1: FullyCoupled | linsolver = d1; initstep = 0.01; minstep = 1.0E-6; maxiter = 100
      d1: Direct | linsolver = pardiso

Datasets
  dset1: Solution | solution = sol1

Plots
  pg1: PlotGroup2D "Velocity (spf)" | data = dset1
    surf1: Surface | expr = spf.U
  pg2: PlotGroup2D "Pressure (spf)" | data = dset1
    con1: Contour | expr = p2
    surf1: Surface | expr = p2
  pg3: PlotGroup1D "1D Plot Group 3" | data = dset1
    lngr1: LineGraph on all boundaries | expr = spf.U; descr = Velocity magnitude; xdata = expr; xdataexpr = p2