// COMSOL Multiphysics 5.3.0.316 model "Q3m.mph"
// Outline of the model tree

Parameters
  deltax = 0

Selections
  sel1: Explicit on domains 2

Probes
  edge1: Edge "Edge Probe 1" on edges 18, 19, 42, 69
    expr = mf.normB
    unit = T
    descr = Magnetic flux density norm
    table = tbl1
  edge2: Edge "Edge Probe 2" on edges 10, 11, 37, 64
    expr = mf.normB
    unit = T
    descr = Magnetic flux density norm
    table = tbl1

Geometry
  geom1 "Geometry 1" (3D, length unit cm)
    wp1: WorkPlane | unite = on
      c1: Circle | r = 5
      c2: Circle | r = 2.5
      dif1: Difference | input = c1; input2 = c2
    ext1: Extrude | extrudefrom = faces; workplane = wp1; input = wp1; inputface = wp1.dif1 boundaries 1; distance = 5
    wp2: WorkPlane | quickz = deltax; unite = on
      c1: Circle | r = 2.2
    ext2: Extrude | workplane = wp2; input = wp2; distance = 2
    wp3: WorkPlane | quickz = 5; unite = on
      c1: Circle | r = 5
      c2: Circle | r = 2.5
      dif1: Difference | input = c1; input2 = c2
    ext3: Extrude | workplane = wp3; input = wp3; distance = 5
    wp4: WorkPlane | quickz = 10; unite = on
      c1: Circle | r = 5
      c2: Circle | r = 2.5
      dif1: Difference | input = c1; input2 = c2
    ext4: Extrude | workplane = wp4; input = wp4; distance = 5
    wp5: WorkPlane | quickz = -40; unite = on
      sq1: Square | base = center; size = 50
    ext5: Extrude | workplane = wp5; input = wp5; distance = 70
    fin: Finalize "Form Union"

Materials
  mat1: Common "BS B500B (steel reinforcing bar) [solid]" on domains 2-4
    def "Basic"
      thermalexpansioncoefficient = (alpha(T[1/K])[1/K]+(Tempref-293[K])*if(abs(T-Tempref)>1e-3,(alpha(T[1/K])[1/K]-alpha(Tempref[1/K])[1/K])/(T-Tempref),d(alpha(T[1/K])[1/K],T)))/(1+alpha(Tempref[1/K])[1/K]*(Tempref-293[K]))
      heatcapacity = C(T[1/K])[J/(kg*K)]
      density = rho(T[1/K])[kg/m^3]
      relpermeability = 1
      electricconductivity = 1450000
      relpermittivity = 1
      alpha: Piecewise
        arg = T
        pieces = 
          {0.0, 680.0, 6.731035E-6+3.918624E-8*T^1-1.534406E-10*T^2+3.517965E-13*T^3-3.827522E-16*T^4+1.565546E-19*T^5}
          {680.0, 977.0, 8.614185E-6+1.013631E-8*T^1-2.26181E-12*T^2-1.569696E-15*T^3}
          {977.0, 1061.0, 6.292031E-5-4.915637E-8*T^1}
          {1061.0, 1144.0, -1.563678E-6+1.162025E-8*T^1}
      C: Piecewise | arg = T; pieces = {293.0, 948.0, 390.1555+0.3606446*T^1-4.476926E-4*T^2+6.079063E-7*T^3}
      rho: Piecewise
        arg = T
        pieces = 
          {0.0, 60.0, 7907.978-0.01549395*T^1}
          {60.0, 977.0, 7911.3-0.01678428*T^1-8.018711E-4*T^2+1.172796E-6*T^3-1.015971E-9*T^4+3.677737E-13*T^5}
          {977.0, 1061.0, 7116.994+0.5195388*T^1}
          {1061.0, 1144.0, 8166.523-0.4696497*T^1}
    ThermalExpansion
      alphatan = CTE(T[1/K])[1/K]
      dL = (dL(T[1/K])-dL(Tempref[1/K]))/(1+dL(Tempref[1/K]))
      alphatanIso = CTE(T)
      dLIso = (dL(T)-dL(Tempref))/(1+dL(Tempref))
      dL: Piecewise
        arg = T
        pieces = 
          {0.0, 50.0, -0.002022973+3.918919E-7*T^1}
          {50.0, 212.0, -0.002063267-3.508062E-7*T^1+2.838477E-8*T^2}
          {212.0, 977.0, -0.002523958+5.644256E-6*T^1+1.0799E-8*T^2-1.801872E-12*T^3-1.569701E-15*T^4}
          {977.0, 1061.0, 0.03264232-2.297313E-5*T^1}
          {1061.0, 1144.0, -0.01351301+2.053771E-5*T^1}
      CTE: Piecewise | arg = T; pieces = {293.0, 1065.0, 5.044861E-6+2.5188E-8*T^1-1.418195E-11*T^2}
    Enu "Young's modulus and Poisson's ratio"
      youngsmodulus = E(T[1/K])[Pa]
      poissonsratio = nu(T[1/K])
      E: Piecewise
        arg = T
        pieces = 
          {4.0, 273.0, 2.217366E11+5020008.0*T^1-305140.4*T^2+926.6601*T^3-1.145454*T^4}
          {273.0, 1050.0, 2.109875E11+3.572844E7*T^1-106319.6*T^2}
          {1050.0, 1500.0, 2.024261E11-6.77381E7*T^1}
      nu: Piecewise
        arg = T
        pieces = 
          {4.0, 120.0, 0.2850355-1.662951E-6*T^1}
          {120.0, 273.0, 0.2848011-7.147353E-6*T^1+6.558945E-8*T^2}
          {273.0, 1053.0, 0.2712267+7.030261E-5*T^1-3.856929E-8*T^2+1.246582E-11*T^3}
          {1053.0, 1500.0, 0.3165268-1.242823E-6*T^1+1.661461E-9*T^2}
    KG "Bulk modulus and shear modulus"
      K = kappa(T[1/K])[Pa]
      G = mu(T[1/K])[Pa]
      mu: Piecewise
        arg = T
        pieces = 
          {4.0, 273.0, 8.626526E10+1636497.0*T^1-108981.6*T^2+291.1261*T^3-0.3377859*T^4}
          {273.0, 1050.0, 8.301552E10+9184755.0*T^1-38834.5*T^2}
          {1050.0, 1500.0, 7.694034E10-2.580357E7*T^1}
      kappa: Piecewise
        arg = T
        pieces = 
          {4.0, 100.0, 1.800573E11-3478717.0*T^1+151512.1*T^2-5485.327*T^3+28.28329*T^4}
          {100.0, 273.0, 1.818111E11-4.023792E7*T^1+84204.68*T^2-93.09453*T^3}
          {273.0, 1500.0, 1.842649E11-2.509462E7*T^1-28588.37*T^2}
  mat3: Common "Iron [solid,polished]" on domains 5
    def "Basic"
      thermalconductivity = k_solid_1(T[1/K])[W/(m*K)]
      resistivity = res_solid_1(T[1/K])[ohm*m]
      thermalexpansioncoefficient = (alpha_solid_1(T[1/K])[1/K]+(Tempref-293[K])*if(abs(T-Tempref)>1e-3,(alpha_solid_1(T[1/K])[1/K]-alpha_solid_1(Tempref[1/K])[1/K])/(T-Tempref),d(alpha_solid_1(T[1/K])[1/K],T)))/(1+alpha_solid_1(Tempref[1/K])[1/K]*(Tempref-293[K]))
      heatcapacity = C_solid_1(T[1/K])[J/(kg*K)]
      electricconductivity = sigma_solid_1(T[1/K])[S/m]
      HC = HC_solid_1(T[1/K])[J/(mol*K)]
      VP = VP_solid_1(T[1/K])[Pa]
      emissivity = epsilon(T[1/K])
      density = rho_solid_1(T[1/K])[kg/m^3]
      nemiss = nemiss_solid_polished_1(T[1/K])
      relpermeability = 0.0023
      relpermittivity = 0.0000001
      k_solid_1: Piecewise
        arg = T
        pieces = 
          {0.0, 20.0, 161.9832*T^1+4.851772*T^2-0.7906936*T^3+0.01675048*T^4}
          {20.0, 68.5, 2218.339+23.88314*T^1-5.081026*T^2+0.1373453*T^3-0.001490064*T^4+5.882957E-6*T^5}
          {68.5, 155.0, 1682.9-46.91385*T^1+0.5423243*T^2-0.002845324*T^3+5.647112E-6*T^4}
          {155.0, 1183.0, 155.6355-0.4470943*T^1+8.9922E-4*T^2-9.859391E-7*T^3+4.862049E-10*T^4-7.562752E-14*T^5}
          {1183.0, 1810.0, -5.097463+0.03983086*T^1-9.936321E-6*T^2}
      res_solid_1: Piecewise "Piecewise 1a"
        arg = T
        pieces = 
          {100.0, 1100.0, 1.408983E-8+8.537916E-12*T^1+8.678851E-13*T^2}
          {1100.0, 1500.0, -3.863736E-6+1.016878E-8*T^1-6.951621E-12*T^2+1.625296E-15*T^3}
      alpha_solid_1: Piecewise "Piecewise 1b" | arg = T; pieces = {0.0, 960.0, 6.78762E-6+2.878178E-8*T^1-7.594277E-11*T^2+1.43191E-13*T^3-1.357067E-16*T^4+4.830576E-20*T^5}
      C_solid_1: Piecewise "Piecewise 1c"
        arg = T
        pieces = 
          {1.0, 20.0, 0.01640777+0.0734379*T^1+0.003543513*T^2+3.434114E-5*T^3+8.786827E-6*T^4}
          {20.0, 130.0, -4.129967+0.9005499*T^1-0.05588171*T^2+0.001972324*T^3-1.807849E-5*T^4+5.251765E-8*T^5}
          {130.0, 500.0, -143.8118+5.191206*T^1-0.0178093*T^2+2.868283E-5*T^3-1.683141E-8*T^4}
          {500.0, 1000.0, 3998.51-21.89081*T^1+0.05023704*T^2-4.990048E-5*T^3+1.85287E-8*T^4}
          {1000.0, 1042.0, -560642.6+1783.888*T^1-1.88951*T^2+6.672367E-4*T^3}
          {1042.0, 1184.0, 5927268.0-20371.74*T^1+26.25897*T^2-0.01504264*T^3+3.231248E-6*T^4}
          {1184.0, 1665.0, 429.5303+0.1496811*T^1}
          {1665.0, 1809.0, 440.2844+0.17782*T^1}
      sigma_solid_1: Piecewise "Piecewise 1d"
        arg = T
        pieces = 
          {100.0, 1100.0, 1/(8.678851E-13*T^2+8.537916E-12*T+1.408983E-08)}
          {1100.0, 1500.0, 1/(1.625296E-15*T^3-6.951621E-12*T^2+1.016878E-08*T-3.863736E-06)}
      HC_solid_1: Piecewise "Piecewise 1e"
        arg = T
        pieces = 
          {1.0, 20.0, 9.163245E-4+0.004101286*T^1+1.978946E-4*T^2+1.91785E-6*T^3+4.907179E-7*T^4}
          {20.0, 130.0, -0.2306463+0.05029302*T^1-0.003120827*T^2+1.101484E-4*T^3-1.00963E-6*T^4+2.932953E-9*T^5}
          {130.0, 500.0, -8.031456+0.2899134*T^1-9.945962E-4*T^2+1.60185E-6*T^3-9.399837E-10*T^4}
          {500.0, 1000.0, 223.3048-1.222536*T^1+0.002805589*T^2-2.786791E-6*T^3+1.034772E-9*T^4}
          {1000.0, 1042.0, -31310.22+99.62481*T^1-0.1055235*T^2+3.726318E-5*T^3}
          {1042.0, 1184.0, 331020.2-1137.7*T^1+1.466485*T^2-8.400865E-4*T^3+1.804555E-7*T^4}
          {1184.0, 1665.0, 23.98798+0.008359239*T^1}
          {1665.0, 1809.0, 24.58855+0.009930716*T^1}
      VP_solid_1: Piecewise "Piecewise 1f" | arg = T; pieces = {293.0, 1811.0, (exp((-2.172300e+04/T+4.536000e-01*log10(T)+9.980810e+00-5.846000e-01/T^3)*log(10.0)))*1.333200e+02}
      epsilon: Piecewise | arg = T; pieces = {293.0, 800.0, -0.02476819+1.854053E-4*T^1+2.719503E-8*T^2}
      rho_solid_1: Piecewise "Piecewise 1g"
        arg = T
        pieces = 
          {0.0, 30.0, 7906.743}
          {30.0, 53.0, 7905.632+0.06730164*T^1-0.001025121*T^2+4.962534E-7*T^3+1.383301E-9*T^4}
          {53.0, 190.0, 7924.0-0.4306436*T^1+0.002196832*T^2-6.010914E-6*T^3}
          {190.0, 960.0, 7910.967-0.100271*T^1-3.511597E-4*T^2+1.470685E-7*T^3}
      nemiss_solid_polished_1: Piecewise "Piecewise 1h" | arg = T; pieces = {200.0, 1093.0, 0.023092+2.143849E-4*T^1}
    ThermalExpansion
      alphatan = CTE(T[1/K])[1/K]
      dL = (dL_solid_1(T[1/K])-dL_solid_1(Tempref[1/K]))/(1+dL_solid_1(Tempref[1/K]))
      alphatanIso = CTE(T)
      dLIso = (dL_solid_1(T)-dL_solid_1(Tempref))/(1+dL_solid_1(Tempref))
      dL_solid_1: Piecewise
        arg = T
        pieces = 
          {0.0, 30.0, -0.001971436}
          {30.0, 110.0, -0.001910556-3.518812E-6*T^1+5.140443E-8*T^2-5.849422E-11*T^3}
          {110.0, 215.0, -0.002967233+1.81617E-5*T^1-9.276156E-8*T^2+2.54081E-10*T^3}
          {215.0, 960.0, -0.002341855+4.083948E-6*T^1+1.512293E-8*T^2-6.083782E-12*T^3}
      CTE: Piecewise
        arg = T
        pieces = 
          {91.0, 400.0, -3.482149E-6+1.265098E-7*T^1-3.745646E-10*T^2+4.692131E-13*T^3-1.879297E-16*T^4}
          {400.0, 550.0, 3.718357E-5-1.761777E-7*T^1+3.878031E-10*T^2-2.554622E-13*T^3}
          {550.0, 960.0, -7.251939E-6+6.376279E-8*T^1-4.206483E-11*T^2}
    Enu "Young's modulus and Poisson's ratio"
      youngsmodulus = E(T[1/K])[Pa]
      poissonsratio = nu(T[1/K])
      E: Piecewise
        arg = T
        pieces = 
          {4.0, 273.0, 2.217366E11+5020008.0*T^1-305140.4*T^2+926.6601*T^3-1.145454*T^4}
          {273.0, 1050.0, 2.109875E11+3.572844E7*T^1-106319.6*T^2}
          {1050.0, 1500.0, 2.024261E11-6.77381E7*T^1}
      nu: Piecewise
        arg = T
        pieces = 
          {4.0, 120.0, 0.2850355-1.662951E-6*T^1}
          {120.0, 273.0, 0.2848011-7.147353E-6*T^1+6.558945E-8*T^2}
          {273.0, 1053.0, 0.2712267+7.030261E-5*T^1-3.856929E-8*T^2+1.246582E-11*T^3}
          {1053.0, 1500.0, 0.3165268-1.242823E-6*T^1+1.661461E-9*T^2}
    KG "Bulk modulus and shear modulus"
      K = kappa(T[1/K])[Pa]
      G = mu(T[1/K])[Pa]
      mu: Piecewise
        arg = T
        pieces = 
          {4.0, 273.0, 8.626526E10+1636497.0*T^1-108981.6*T^2+291.1261*T^3-0.3377859*T^4}
          {273.0, 1050.0, 8.301552E10+9184755.0*T^1-38834.5*T^2}
          {1050.0, 1500.0, 7.694034E10-2.580357E7*T^1}
      kappa: Piecewise
        arg = T
        pieces = 
          {4.0, 100.0, 1.800573E11-3478717.0*T^1+151512.1*T^2-5485.327*T^3+28.28329*T^4}
          {100.0, 273.0, 1.818111E11-4.023792E7*T^1+84204.68*T^2-93.09453*T^3}
          {273.0, 1500.0, 1.842649E11-2.509462E7*T^1-28588.37*T^2}
  mat4: Common "Air [gas]" on domains 1
    def "Basic"
      thermalconductivity = k(T[1/K])[W/(m*K)]
      heatcapacity = C(T[1/K])[J/(kg*K)]
      density = rho_gas_2(T[1/K])[kg/m^3]
      TD = TD(T[1/K])[m^2/s]
      dynamicviscosity = eta(T[1/K])[Pa*s]
      relpermeability = 1
      electricconductivity = 1
      relpermittivity = 0
      k: Piecewise | arg = T; pieces = {70.0, 1000.0, -8.404165E-4+1.107418E-4*T^1-8.635537E-8*T^2+6.31411E-11*T^3-1.88168E-14*T^4}
      C: Piecewise
        arg = T
        pieces = 
          {100.0, 375.0, 1010.97+0.0439479*T^1-2.922398E-4*T^2+6.503467E-7*T^3}
          {375.0, 1300.0, 1093.29-0.6355521*T^1+0.001633992*T^2-1.412935E-6*T^3+5.59492E-10*T^4-8.663072E-14*T^5}
          {1300.0, 3000.0, 701.0807+0.8493867*T^1-5.846487E-4*T^2+2.302436E-7*T^3-4.846758E-11*T^4+4.23502E-15*T^5}
      rho_gas_2: Piecewise "Piecewise 2a" | arg = T; pieces = {80.0, 3000.0, 352.716*T^-1}
      TD: Piecewise
        arg = T
        pieces = 
          {300.0, 753.0, 1.713214E-4-1.204913E-6*T^1+2.839046E-9*T^2-1.532799E-12*T^3}
          {753.0, 873.0, 0.00416418-1.191227E-5*T^1+8.863636E-9*T^2}
      eta: Piecewise
        arg = T
        pieces = 
          {120.0, 600.0, -1.132275E-7+7.94333E-8*T^1-7.197989E-11*T^2+5.158693E-14*T^3-1.592472E-17*T^4}
          {600.0, 2150.0, 3.892629E-6+5.75387E-8*T^1-2.675811E-11*T^2+9.709691E-15*T^3-1.355541E-18*T^4}

Physics
  mf: InductionCurrents "Magnetic Fields" on all domains
    dependent variable A = {Ax, Ay, Az}
    al1: AmperesLaw "Ampère's Law 1" (default)
    mi1: MagneticInsulation (default)
    init1: init "Initial Values 1" (default)
    coil1: Coil on domains 3 | ConductorModel = Multi; CoilExcitation = Voltage; CoilType = Circular
      cre1: CoilReferenceEdge "Coil Geometry 1" on edges 13, 14, 16, 17, 39, 41, 66, 68
    coil2: Coil on domains 2
      ConductorModel = Multi
      CoilExcitation = Voltage
      CoilType = Circular
      VCoil = 0[V]
      N = 100
      cre1: CoilReferenceEdge "Coil Geometry 1" on edges 10, 11, 13, 14, 16-19, 37, 39, 41, 42, 64, 66, 68, 69
        Reverse = 1
    fcal1: ForceCalculation on domains 5 | ForceName = result; TorqueAxis = {2.2, 0, 2}
    coil3: Coil on domains 4
      ConductorModel = Multi
      CoilExcitation = Voltage
      CoilType = Circular
      VCoil = 0[V]
      N = 100
      cre1: CoilReferenceEdge "Coil Geometry 1" on edges 10, 11, 13, 14, 16-19, 37, 39, 41, 42, 64, 66, 68, 69
        Reverse = 0

Mesh
  mesh1 "Mesh 1" (physics-controlled)

Studies
  std1 "Study 1"
    param: Parametric "Parametric Sweep" | pname = deltax; plistarr = range(0,1,13)
    stat: Stationary

Tables
  tbl1: Table "Probe Table 1"
    deltax | Magnetic flux density norm (T), Edge Probe 1 | Magnetic flux density norm (T), Edge Probe 2
    0 | 0.000254267 | 0.00025454
    1 | 0.000252459 | 0.000240394
    2 | 0.000250001 | 0.000225205
    3 | 0.000245303 | 0.000213838
    4 | 0.000237329 | 0.00020328
    5 | 0.0002266 | 0.00020133
    6 | 0.00021566 | 0.000205929
    7 | 0.000205799 | 0.000215775
    8 | 0.000202419 | 0.000226776
    9 | 0.000203932 | 0.00023742
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
Plots
  pg3: PlotGroup1D "Probe Plot Group 3" | data = none
    tblp1: Table "Probe Table Graph 1" | table = tbl1