// COMSOL Multiphysics 5.3.0.316 model "Q3.mph"
// Piezoresistive Pressure Sensor, Shell
// modeldescr_mems/piezoresistive_pressure_sensor_shell
// A piezoresistive pressure sensor is simulated. This model shows how to set compute the stress induced potential difference produced by a four terminal piezoresistor when the membrane in which it is embedded is deformed by an applied pressure. The Piezoresistivity, Shell interface is used. The model is based on an analysis of an early MEMS pressure sensor: the Motorola MAP sensor (S. D. Senturia, Microsystem Design, Springer, 2000).
// The model requires the MEMS Module and the Structural Mechanics Module.
// Outline of the model tree

Parameters
  Pressure = 1000[kPa]

Selections
  sel1: Explicit "Piezoresistor" on boundaries 9
  sel2: Explicit "Connections" on boundaries 3, 5, 6, 8, 13-15, 18
  box1: Box "Membrane" | entitydim = 2; xmin = -501; xmax = 501; ymin = -30; ymax = 1000; condition = inside
  uni1: Union "Model boundaries" | entitydim = 2; input = {sel2, box1}
  uni2: Union "Electric currents" | entitydim = 2; input = {sel2, sel1}
  adj1: Adjacent "Fixed Edges" | entitydim = 2; input = {box1}; outputdim = 1
  dif1: Difference "Fixed Boundaries" | entitydim = 2; add = {uni1}; subtract = {box1}

Coordinate systems
  sys2: Rotated "Rotated System 2" | angle = {-45[deg], 0, 0}

Geometry
  geom1 "Geometry 1" (3D, length unit µm)
    imp1: Import
      sellayershow = dom
      type = native
      filename = piezoresistive_pressure_sensor_shell.mphbin
      meshfilename = piezoresistive_pressure_sensor_shell.mphbin
    fin: Finalize "Form Union"

Materials
  mat1: Common "n-Silicon (single-crystal, lightly doped)" on all boundaries
    // C. S. Smith, “Piezoresistance Effect in Silicon and Germanium”, Physical Review, vol. 94, no. 1, pp. 42-49, 1957.
    // C. Jacoboni, C. Canali, G. Ottaviani and A. Alberigi Quaranta, “A Review of some Charge Transport Properties of Silicon”, Solid-State Electronics, vol. 20, pp. 77-89, 1977.
    def "Basic"
      density = 2330[kg/m^3]
      relpermittivity = 4.5
      electricconductivity = sigma0(nd[m^3])
      an1: Analytic | funcname = sigma0; expr = (N*e_const*0.1400/sqrt(1+N/(N/350 +3e22))); args = N
    Anisotropic
      D = {166[GPa], 64[GPa], 64[GPa], 0[GPa], 0[GPa], 0[GPa], 64[GPa], 166[GPa], 64[GPa], 0[GPa], 0[GPa], 0[GPa], 64[GPa], 64[GPa], 166[GPa], 0[GPa], 0[GPa], 0[GPa], 0[GPa], 0[GPa], 0[GPa], 80[GPa], 0[GPa], 0[GPa], 0[GPa], 0[GPa], 0[GPa], 0[GPa], 80[GPa], 0[GPa], 0[GPa], 0[GPa], 0[GPa], 0[GPa], 0[GPa], 80[GPa]}
      eta_D = {0, 0, 0, 0, 0, 0, 0, 0, 0, 0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}
    AnisotropicVoGrp "Anisotropic, Voigt notation"
      DVo = {166[GPa], 64[GPa], 64[GPa], 0[GPa], 0[GPa], 0[GPa], 64[GPa], 166[GPa], 64[GPa], 0[GPa], 0[GPa], 0[GPa], 64[GPa], 64[GPa], 166[GPa], 0[GPa], 0[GPa], 0[GPa], 0[GPa], 0[GPa], 0[GPa], 80[GPa], 0[GPa], 0[GPa], 0[GPa], 0[GPa], 0[GPa], 0[GPa], 80[GPa], 0[GPa], 0[GPa], 0[GPa], 0[GPa], 0[GPa], 0[GPa], 80[GPa]}
      eta_DVo = {0, 0, 0, 0, 0, 0, 0, 0, 0, 0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}
    PiezoresistanceForm
      Pil = {-102.2e-11[1/Pa]/sigma0(nd[m^3])[S/m], 53.4e-11[1/Pa]/sigma0(nd[m^3])[S/m], 53.4e-11[1/Pa]/sigma0(nd[m^3])[S/m], 0, 0, 0, 53.4e-11[1/Pa]/sigma0(nd[m^3])[S/m], -102.2e-11[1/Pa]/sigma0(nd[m^3])[S/m], 53.4e-11[1/Pa]/sigma0(nd[m^3])[S/m], 0, 0, 0, 53.4e-11[1/Pa]/sigma0(nd[m^3])[S/m], 53.4e-11[1/Pa]/sigma0(nd[m^3])[S/m], -102.2e-11[1/Pa]/sigma0(nd[m^3])[S/m], 0, 0, 0, 0, 0, 0, -13.6e-11[1/Pa]/sigma0(nd[m^3])[S/m], 0, 0, 0, 0, 0, 0, -13.6e-11[1/Pa]/sigma0(nd[m^3])[S/m], 0, 0, 0, 0, 0, 0, -13.6e-11[1/Pa]/sigma0(nd[m^3])[S/m]}
      an1: Analytic | funcname = sigma0; expr = (N*e_const*0.1400/sqrt(1+N/(N/350 +3e22))); args = N
    ElastoresistanceForm
      ml = {-101.4/sigma0(nd[m^3])[S/m], 57.6/sigma0(nd[m^3])[S/m], 57.6/sigma0(nd[m^3])[S/m], 0, 0, 0, 57.6/sigma0(nd[m^3])[S/m], -101.4/sigma0(nd[m^3])[S/m], 57.6/sigma0(nd[m^3])[S/m], 0, 0, 0, 57.6/sigma0(nd[m^3])[S/m], 57.6/sigma0(nd[m^3])[S/m], -101.4/sigma0(nd[m^3])[S/m], 0, 0, 0, 0, 0, 0, -10.8/sigma0(nd[m^3])[S/m], 0, 0, 0, 0, 0, 0, -10.8/sigma0(nd[m^3])[S/m], 0, 0, 0, 0, 0, 0, -10.8/sigma0(nd[m^3])[S/m]}
      an1: Analytic | funcname = sigma0; expr = (N*e_const*0.1400/sqrt(1+N/(N/350 +3e22))); args = N
  mat2: Common "p-Silicon (single-crystal, lightly doped)" on selection uni2
    // C. S. Smith, “Piezoresistance Effect in Silicon and Germanium”, Physical Review, vol. 94, no. 1, pp. 42-49, 1957.
    // C. Jacoboni, C. Canali, G. Ottaviani and A. Alberigi Quaranta, “A Review of some Charge Transport Properties of Silicon”, Solid-State Electronics, vol. 20, pp. 77-89, 1977.
    def "Basic"
      density = 2330[kg/m^3]
      relpermittivity = 4.5
      electricconductivity = sigma0(nd[m^3])
      an1: Analytic | funcname = sigma0; expr = (N*e_const*0.048/sqrt(1+N/(N/81 +4e22))); args = N
    Anisotropic
      D = {166[GPa], 64[GPa], 64[GPa], 0[GPa], 0[GPa], 0[GPa], 64[GPa], 166[GPa], 64[GPa], 0[GPa], 0[GPa], 0[GPa], 64[GPa], 64[GPa], 166[GPa], 0[GPa], 0[GPa], 0[GPa], 0[GPa], 0[GPa], 0[GPa], 80[GPa], 0[GPa], 0[GPa], 0[GPa], 0[GPa], 0[GPa], 0[GPa], 80[GPa], 0[GPa], 0[GPa], 0[GPa], 0[GPa], 0[GPa], 0[GPa], 80[GPa]}
      eta_D = {0, 0, 0, 0, 0, 0, 0, 0, 0, 0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}
    AnisotropicVoGrp "Anisotropic, Voigt notation"
      DVo = {166[GPa], 64[GPa], 64[GPa], 0[GPa], 0[GPa], 0[GPa], 64[GPa], 166[GPa], 64[GPa], 0[GPa], 0[GPa], 0[GPa], 64[GPa], 64[GPa], 166[GPa], 0[GPa], 0[GPa], 0[GPa], 0[GPa], 0[GPa], 0[GPa], 80[GPa], 0[GPa], 0[GPa], 0[GPa], 0[GPa], 0[GPa], 0[GPa], 80[GPa], 0[GPa], 0[GPa], 0[GPa], 0[GPa], 0[GPa], 0[GPa], 80[GPa]}
      eta_DVo = {0, 0, 0, 0, 0, 0, 0, 0, 0, 0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}
    PiezoresistanceForm
      Pil = {6.6e-11[1/Pa]/sigma0(nd[m^3])[S/m], -1.1e-11[1/Pa]/sigma0(nd[m^3])[S/m], -1.1e-11[1/Pa]/sigma0(nd[m^3])[S/m], 0, 0, 0, -1.1e-11[1/Pa]/sigma0(nd[m^3])[S/m], 6.6e-11[1/Pa]/sigma0(nd[m^3])[S/m], -1.1e-11[1/Pa]/sigma0(nd[m^3])[S/m], 0, 0, 0, -1.1e-11[1/Pa]/sigma0(nd[m^3])[S/m], -1.1e-11[1/Pa]/sigma0(nd[m^3])[S/m], 6.6e-11[1/Pa]/sigma0(nd[m^3])[S/m], 0, 0, 0, 0, 0, 0, 138.1e-11[1/Pa]/sigma0(nd[m^3])[S/m], 0, 0, 0, 0, 0, 0, 138.1e-11[1/Pa]/sigma0(nd[m^3])[S/m], 0, 0, 0, 0, 0, 0, 138.1e-11[1/Pa]/sigma0(nd[m^3])[S/m]}
      an1: Analytic | funcname = sigma0; expr = (N*e_const*0.048/sqrt(1+N/(N/81 +4e22))); args = N
    ElastoresistanceForm
      ml = {9.6/sigma0(nd[m^3])[S/m], 1.8/sigma0(nd[m^3])[S/m], 1.8/sigma0(nd[m^3])[S/m], 0, 0, 0, 1.8/sigma0(nd[m^3])[S/m], 9.6/sigma0(nd[m^3])[S/m], 1.8/sigma0(nd[m^3])[S/m], 0, 0, 0, 1.8/sigma0(nd[m^3])[S/m], 1.8/sigma0(nd[m^3])[S/m], 9.6/sigma0(nd[m^3])[S/m], 0, 0, 0, 0, 0, 0, 110.0/sigma0(nd[m^3])[S/m], 0, 0, 0, 0, 0, 0, 110.0/sigma0(nd[m^3])[S/m], 0, 0, 0, 0, 0, 0, 110.0/sigma0(nd[m^3])[S/m]}
      an1: Analytic | funcname = sigma0; expr = (N*e_const*0.048/sqrt(1+N/(N/81 +4e22))); args = N

Physics
  shell: Shell on selection uni1
    dependent variable u = {u, v, w}
    d.d = 20[um]
    emm1: Elastic "Linear Elastic Material 1" (default) | SolidModel = Anisotropic; AnisotropicOption = AnisotropicVo
      shls1: ShellLocalSystem (default) | coordinateSystem = sys2
    free1: Free (default)
    init1: init "Initial Values 1" (default)
    fix1: Fixed "Fixed Constraint 1" on selection adj1
    fix2: Fixed "Fixed Constraint 2" on selection dif1
    fl1: FaceLoad on selection box1 | LoadTypeForce = FollowerLoad; FollowerPressure = Pressure
  ecs: ConductiveMediaShell "Electric Currents, Shell" on selection uni2
    dependent variable V
    ds.ds = 0.4[um]
    cucn1: CurrentConservation (default) | coordinateSystem = sys2; minput_numberdensity = 1.45e20[1/cm^3]
    ein1: ElectricInsulation (default)
    init1: init "Initial Values 1" (default)
    pzrm1: PiezoresistiveMaterial on selection sel1 | coordinateSystem = sys2; minput_numberdensity = 1.32e19[1/cm^3]
    gnd1: Ground on edges 73
    term1: Terminal on edges 11, 13 | TerminalType = Voltage; V0 = 3
    term2: Terminal on edges 7
    term3: Terminal on edges 75, 76

Multiphysics
  pzrs1: PiezoresistiveEffectShell on all boundaries | Solid_physics = shell; ElectricCurrents_physics = ecs

Mesh
  mesh1 "Mesh 1"
    size: MeshSizeDefault | hmax = 60; hmin = 0.5; custom = on
    size1: Size on selection sel1 | hmax = 2; custom = on; hmin = 0.1
    size2: Size on selection sel2 | hmax = 6; custom = on; hmin = 0.1
    size3: Size on edges 27, 29, 40-46, 53-55 | hmax = 0.4; custom = on; hmin = 0.1
    ftri1: FreeTri "Free Triangular 1" on boundaries 2, 3, 5-9, 11-16, 18

Studies
  std1 "Study 1"
    param: Parametric "Parametric Sweep" | pname = Pressure; plistarr = range(1,50,2000)
    stat: Stationary

Tables
  tbl3: Table
    // Global Evaluation 1 (Pressure)
    Pressure | Pressure (Pa)
    1 | 1
    31 | 31
    61 | 61
    91 | 91
    121 | 121
    151 | 151
    181 | 181
    211 | 211
    241 | 241
    271 | 271
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